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/batch
! ANSYS input file written by Workbench version 19.1 RELEASE
! File used for geometry attach: /media/cart3sianbear/InternalStorage/Documents/ENSEM/PFE/urban-two/UrbanTwo_files/dp0/Geom-4/DM/Geom-4.agdb
/title,UrbanTwo--Static Structural (F5)
/com,--- Data in consistent MKS units. See Solving Units in the help system for more information.
/units,MKS
/prep7
! Turn off shape checking because checks already performed inside WB mesher.
! See help system for more information.
SHPP,OFF,,NOWARN
etcon,set             ! allow ANSYS to choose best KEYOP's for 180x elements
/com,*********** Nodes for the whole assembly ***********
nblock,3,,3690
(1i9,3e20.9e3)
        1     6.224552732E-01     1.007085554E+00     4.824077166E-04
        2     4.861101475E-01     2.535610418E+00     1.230764029E-04
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-1
/com,*********** Elements for Body 1 "Surface Body" ***********
et,1,181
keyo,1,3,2
eblock,19,solid,,3391
(19i9)
        1        1        1        1        0        0        0        0        4        0        1       88        2       31       31
        1        1        1        1        0        0        0        0        4        0        2     2322     2391     2347     2347
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-1
/com,*********** Send User Defined Coordinate System(s) ***********
csys,0
toffst,273.15,  ! Temperature offset from absolute zero
/com,*********** Set Reference Temperature ***********
tref,22.
/com,*********** Send Materials ***********
MP,DENS,1,1420,	! kg m^-3
MP,EX,1,61340000000,	! Pa
MP,EY,1,61340000000,	! Pa
MP,EZ,1,6900000000,	! Pa
MP,PRXY,1,0.04,
MP,PRYZ,1,0.3,
MP,PRXZ,1,0.3,
MP,GXY,1,19500000000,	! Pa
MP,GYZ,1,2700000000,	! Pa
MP,GXZ,1,2700000000,	! Pa

TB,FCLI,1,1,9,2
TBDATA,1,0.0126,-0.0102,0.0126,-0.0102,0.008,-0.012
TBDATA,7,0.022,0.019
MP,ALPX,1,2.2e-06,	! C^-1
MP,ALPY,1,2.2e-06,	! C^-1
MP,ALPZ,1,1e-05,	! C^-1

TB,FCLI,1,1,20,1
TBDATA,1,805000000
TBDATA,2,-509000000
TBDATA,3,805000000
TBDATA,4,-509000000
TBDATA,5,50000000
TBDATA,6,-170000000
TBDATA,7,125000000
TBDATA,8,65000000
TBDATA,9,65000000
TBDATA,10,-1
TBDATA,11,-1
TBDATA,12,-1

/com,*********** Send Sheet Properties ***********
sectype,1,shell
secdata,2.e-002
secoff,mid
!************************* Model Summary ********************
!Surface Body,	Epoxy Carbon Woven (230 GPa) Prepreg,	matid,	1
!************************* End Model Summary ********************
/com,*********** Fixed Supports ***********
CMBLOCK,_FIXEDSU,NODE,      777
(8i10)
         1         2         3         4         5         6         7         8
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cmsel,s,_FIXEDSU
d,all,all
nsel,all
/com,*********** Define Force Using Surface Effect Elements ***********
local,12,0,0.,0.,0.,0.,0.,0.
csys,0
et,2,154
eblock,10,,,16
(15i9)
     3392        2        2        2       12      852     1079      851      851
     3393        2        2        2       12     1078      853      854      854
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-1
esel,s,type,,2
keyop,2,2,1                ! Apply load in local coordinate system
keyop,2,7,1                ! Use original area so load is constant in large deformation
keyop,2,11,2               ! Use real and not project area
esel,all

*DIM,_loadvari77x,TABLE,2,1,1,TIME,
! Time values
_loadvari77x(1,0,1) = 0.
_loadvari77x(2,0,1) = 1.
! Load values
_loadvari77x(1,1,1) = 0.
_loadvari77x(2,1,1) = 3.27935626966643e-002


*DIM,_loadvari77y,TABLE,2,1,1,TIME,
! Time values
_loadvari77y(1,0,1) = 0.
_loadvari77y(2,0,1) = 1.
! Load values
_loadvari77y(1,1,1) = 0.
_loadvari77y(2,1,1) = -33.6253130271473


*DIM,_loadvari77z,TABLE,2,1,1,TIME,
! Time values
_loadvari77z(1,0,1) = 0.
_loadvari77z(2,0,1) = 1.
! Load values
_loadvari77z(1,1,1) = 0.
_loadvari77z(2,1,1) = -3346.51173374751

fini
/com,****************************************************************************
/com,*************************    SOLUTION       ********************************
/com,****************************************************************************
/solu
antype,0                   ! static analysis
eqsl,sparse,,,,,1
cntr,print,1               ! print out contact info and also make no initial contact an error
dmpoption,emat,no             ! Don't combine emat file for DANSYS
dmpoption,esav,no             ! Don't combine esav file for DANSYS
nldiag,cont,iter           ! print out contact info each equilibrium iteration
rescontrol,,none                 ! Do not keep any restart files
/com,****************************************************
/com,******************* SOLVE FOR LS 1 OF 1 ****************
esel,s,type,,2
nsle
sfe,all,1,pres,1,%_loadvari77x%
sfe,all,2,pres,1,%_loadvari77y%
sfe,all,3,pres,1,%_loadvari77z%
nsel,all
esel,all
nsub,1,1,1
time,1.
outres,erase
outres,all,none
outres,nsol,all,
outres,rsol,all
outres,strs,all,
outres,epel,all,
outres,eppl,all,
stabilize,off                   ! Stabilization turned OFF by user
! *********** WB SOLVE COMMAND ***********
! check interactive state
*get,ANSINTER_,active,,int
*if,ANSINTER_,ne,0,then
/eof
*endif
solve
/com *************** Write FE CONNECTORS *********
CEWRITE,file,ce,,INTE
/com,****************************************************
/com,*************** FINISHED SOLVE FOR LS 1 *************
/post1
fini
